# direct discharge of wastewater average

Dataset: EcoSpold 2, unit process
Geography: GLO
Time period: 1995-01-01 to 2025-12-31
Technology level: current
Classification: ISIC rev.4 ecoinvent: 3700:Sewerage
Scenario: Business-as-Usual
Share of production covered: 100 %
Generated by: Pascal Lesage
isCopyrightProtected: true
accessRestrictedTo: 1

## General comment
Based on statistical data about #TODO

## Included activities start
From the discharge of wastewater to the sewer grid.

## Included activities end
This activity ends with the discharge of untreated wastewater to the natural environment. This includes discharge of wastewater from sewers not connected to wastewater treatment plants and discharge due to combined sewer overflow (CSO), which are direct discharges of wastewater to the environment during episodes (e.g. heavy rainfall, snow melt) where wastewater volume exceeds the capacity of the sewer system or treatment plant.

## Geography
TODO

## Technology
No technology modelled: direct discharge.

## Time period
Untreated fraction based on country-specific data for 2015
Combined sewer overflow data based on TODO

## Reference product
- wastewater, average: -1 m3
  Wastewater sent to sewer system and directly emitted to environment
  production volume 3000 m3
    Calculated based on total amount of wastewater set to the sewer system (10000), as determined from the amount of wastewater and the production volume of the generating activity and the fraction of wastewater sent to sewers not connected to a wastewater treatment plant (0.3)
  property mass concentration, dissolved ammonia NH4 as N 0.000105737 kg/m3
    Mass concentration of dissolved ammonia NH4 (CAS 007664-41-7) as N. Note that dissolved and particulate N are optional yet desirable specifications of total nitrogen.
  property mass concentration, dissolved nitrate NO3 as N 0.000275248 kg/m3
    Mass concentration of dissolved nitrate NO3 (CAS 014797-55-8) as N. Note that dissolved and particulate N are optional yet desirable specifications of total nitrogen.
  property mass concentration, dissolved nitrite NO2 as N 0.000962896 kg/m3
    Mass concentration of dissolved nitrite NO2 (CAS 014797-65-0) as N. Note that dissolved and particulate N are optional yet desirable specifications of total nitrogen.
  property mass concentration, particulate nitrogen 0.000651336 kg/m3
    Mass concentration of particulate nitrogen as N. Note that dissolved and particulate N are optional yet desirable specifications of total nitrogen.
  property mass concentration, dissolved organic nitrogen as N 0.000999829 kg/m3
    Mass concentration of dissolved organic nitrogen as N. Note that dissolved and particulate N are optional yet desirable specifications of total nitrogen.
  property mass concentration, dissolved phosphate PO4 as P 0.000656246 kg/m3
    Mass concentration of Dissolved Phosphate PO4 as P. Note that dissolved and particulate P are optional yet desirable specifications of total phosphorous.
  property mass concentration, dissolved sulfate SO4 as S 0.000662203 kg/m3
    Mass concentration of dissolved sulfate SO4 (CAS 014808-79-8) as S. Note that dissolved and particulate S are optional yet desirable specifications of total sulfur.
  property mass concentration, particulate sulfur 0.000330909 kg/m3
    Mass concentration of particulate sulfur as S. Note that dissolved and particulate S are optional yet desirable specifications of total sulfur.
  property mass concentration, particulate phophorus 0.000942876 kg/m3
    Mass concentration of Particulate Phophorus as P. Note that dissolved and particulate P are optional yet desirable specifications of total phosphorous.
  property mass concentration, dissolved Kjeldahl Nitrogen as N 9.25578e-5 kg/m3
    Mass concentration of dissolved Kjeldahl (SKN) as N. Note that dissolved Kjeldahl Nitrogen is an optional yet desirable specification of total Kjeldahl Nitrogen.
  property mass concentration, Kjeldahl Nitrogen as N 0.000980456 kg/m3
    Mass concentration of total Kjeldahl (TKN) as N. Note that dissolved Kjeldahl Nitrogen is an optional yet desirable specification of total Kjeldahl Nitrogen.
  properties: BOD5, mass per volume 0.000695088 kg/m3, COD, mass per volume 0.000397056 kg/m3, mass concentration, DOC 0.000104072 kg/m3, mass concentration, TOC 0.00019404 kg/m3, mass concentration, nitrogen 3.66527e-5 kg/m3, mass concentration, sulfur 0.000713744 kg/m3, mass concentration, boron 0.000950184 kg/m3, mass concentration, phophorus 0.000573448 kg/m3, wet mass 1000.01 kg, water in wet mass 1000 kg, water content 1, dry mass 0.0125856 kg, carbon content, fossil 0, carbon content, non-fossil 0
