# treatment of wastewater average, average treatment

Dataset: EcoSpold 2, unit process
Geography: GLO
Time period: 1995-01-01 to 2025-12-31
Technology level: current
Classification: ISIC rev.4 ecoinvent: 3700:Sewerage
Scenario: Business-as-Usual
Generated by: Pascal Lesage
isCopyrightProtected: true
accessRestrictedTo: 1

## General comment
The inventory for most exchanges based on a marginal approach. The TODO model was run twice: once with the contribution of the wastewater of interest, and once without. The inputs and outputs attributed to the wastewater of interest were determined based on the difference between these two model runs. For more information, see the documentation on the tool's website, URL
Exchanges not based on the marginal approach include X (based on y) and z (based on w)
TODO a comment about averaging

## Included activities start
From the discharge of wastewater to the sewer grid.

## Included activities end
This activity ends with the discharge of treated wastewater to the natural environment.This activity includes the transportation of wastewater via the sewer grid, and the treatment of the wastewater in the wastewater treatment plant.The amounts of infrastructure and consumables are also included as inputs to the activity. By definition, wastewater not sent to the sewer grid is also excluded. The fraction of wastewater discharged to the sewer grid but ultimately not treated because the sewer is unconnected and direct emissions due to combined sewer overflow are also excluded. These are included in another dataset specifically covering the discharge of untreated wastewater. The production of sludge is included, but its treatment is covered by another treatment activity.

## Geography
TODO - DEPENDS N HOW WE GLOBALLY AVERAGE

## Technology
The treatment dataset represents a weighted average of multiple models of wastewater treatment plants. TODO Some more text
0%: The auto_generated string representing tech 0, Class 1 (over 100,000 per-capita equivalents), Spain1%: The auto_generated string representing tech 1, Class 2 ( 50,000 to 100,000 per-capita equivalents), Spain

## Time period
TODO, descr: additional explanations concerning the temporal validity of the flow data reported.

## Reference product
- wastewater, average: -1 m3
  Wastewater emitted to the sewer system and treated. Wastewater properties differ from those of wastewater actually sent to the sewer system in that they account for losses due to combined sewer overflow (CSO)
  production volume 7000 m3
    Calculated based on total amount of wastewater set to the sewer system (10000), as determined from the amount of wastewater and the production volume of the generating activity and the fraction of wastewater sent to sewers not connected to a wastewater treatment plant (0.3). Only the fraction sent to a wastewater treatment pland included in production volume
  properties: mass concentration, TOC 0.01 kg/m3, wet mass 1000.01 kg, water in wet mass 1000 kg, water content 1, dry mass 0.01 kg, carbon content, fossil 0, carbon content, non-fossil 0

## Inputs from technosphere
- electricity, low voltage: 42 kWh; lognormal variance with pedigree 0.1233, pedigree (1,2,3,4,5)
  How is this calculated?
  Uncertainty: TODO
- iron (III) chloride: 12 kg; lognormal variance with pedigree 0.1233, pedigree (1,2,3,4,5)
  Used for chemical removal of P
  Uncertainty: TODO
- polyacrylamide: 99 kg; lognormal variance with pedigree 0.1233, pedigree (1,2,3,4,5)
  Used for sludge dewatering
  Uncertainty: TODO
  properties: dry mass 1 kg, wet mass 1 kg, carbon content, fossil 0.51
- sodium bicarbonate: 666 kg; lognormal variance with pedigree 0.1233, pedigree (1,2,3,4,5)
  Used to maintain alkalinity
  Uncertainty: TODO

## Sampling procedure
TODO
