# treatment of wastewater no name, average treatment

Dataset: EcoSpold 2, unit process
Geography: Global
Time period: 1995-01-01 to 2025-12-31
Technology level: current
Classification: ISIC rev.4 ecoinvent: 3700:Sewerage
Scenario: Business-as-Usual
Generated by: Pascal Lesage
isCopyrightProtected: true
accessRestrictedTo: 1

## General comment
The inventory is mostly based on activated sludge process guidelines typically known as Metcalf and Eddy (Tchobanoglous et al., 2014) that comprise a set of equations that, computed in a sequential manner, are used to quantify a number of design outputs as a function of design inputs. The design inputs include influent characteristics (e.g. flow, concentration of pollutants), operational settings (e.g. oxygen concentration in the biological reactor), safety factors, kinetic and stoichiometric parameters and effluent requirements (e.g. target ammonia concentration in the effluent of the WWTP). The design outputs comprise aerobic, anoxic, anaerobic volumes, dissolved oxygen demand; internal and external recycle flow-rates, settling areas and dosage of chemicals (external carbon source, metal salts, and alkalinity).
The treatment of wastewater from no name was modelled in 4 WWTP models. The relation of inputs and outputs to 1m3 of treated wastewater from no name is based on a marginal approach: for each of the WWTP models, the model is first run supposing that the WWTP does not treat the wastewater from no name, and then a second time with an additional 1m3 of wastewater from no name. Then, the difference between the two sets of results is calculated, and normalized to 1m3. A weighted average of these results is then calculated based on the market share of each of the plants.
Some exchanges are actually not specifically based on the design guidelines (electricity demand, infrastructure). These are identified in exchange comments. For more information on the model, see the tool's website at http://prqv.vps.infomaniak.com/ecoinvent/n-wwtp.php?activity_name=&geography=GLO&ww_type=municipal&wwtp_type=average&Q=1&T=12&COD=300&TKN=35&TP=6&Ag=0&Al=1.0379&As=0.0009&B=0&Ba=0&Be=0&Br=0&Ca=50.834&Cd=0.0003&Cl=30.031&Co=0.0016&Cr=0.0122&Cu=0.0374&F=0.0328&Fe=7.0928&Hg=0.0002&I=0&K=0.3989&Mg=5.7071&Mn=0.053&Mo=0.001&Na=2.186&Ni=0.0066&Pb=0.0086&Sb=0&Sc=0&Se=0&Si=3.1263&Sn=0.0034&Sr=0&Ti=0&Tl=0&V=0&W=0&Zn=0.1094&

## Included activities start
From the discharge of wastewater to the sewer grid.

## Included activities end
This activity ends with the discharge of treated wastewater to the natural environment.This activity includes the transportation of wastewater via the sewer grid, and the treatment of the wastewater in the wastewater treatment plant.The amounts of infrastructure and consumables are also included as inputs to the activity. By definition, wastewater not sent to the sewer grid is also excluded. The fraction of wastewater discharged to the sewer grid but ultimately not treated because the sewer is unconnected and direct emissions due to combined sewer overflow are also excluded. These are included in another dataset specifically covering the discharge of untreated wastewater. The production of sludge is included, but its treatment is covered by another treatment activity.

## Geography
No data was available for the region. Based on a rough approximation of the global data.

## Technology
The treatment dataset represents a weighted average of multiple models of wastewater treatment plants.
Averaged technologies:
Share: 9%;
aerobic intensive;
Technology summary: Aerobic BOD removal, Nitrification, Denitrification, Biological P removal;
Capacity: 62000 PE;
Capacity class: wastewater treatment facility, capacity class 2, between 50,000 and 100,000 PE PE;
Location: GLO
Share: 13%;
aerobic intensive;
Technology summary: Aerobic BOD removal, Nitrification, Denitrification, Biological P removal;
Capacity: 502000 PE;
Capacity class: wastewater treatment facility, capacity class 1, greater than 100,000 PE PE;
Location: GLO
Share: 30%;
aerobic intensive;
Technology summary: Aerobic BOD removal, Nitrification, Denitrification, Biological P removal;
Capacity: 1124000 PE;
Capacity class: wastewater treatment facility, capacity class 1, greater than 100,000 PE PE;
Location: GLO
Share: 47%;
aerobic intensive;
Technology summary: Aerobic BOD removal, Nitrification, Denitrification, Biological P removal;
Capacity: 1765000 PE;
Capacity class: wastewater treatment facility, capacity class 1, greater than 100,000 PE PE;
Location: GLO

## Time period
TODO, descr: additional explanations concerning the temporal validity of the flow data reported.

## Reference product
- wastewater, no name: -1 m3
  Wastewater emitted to the sewer system and treated. Wastewater properties differ from those of wastewater actually sent to the sewer system in that they account for losses due to combined sewer overflow (CSO)
  production volume 267.393 m3
    Calculated based on total amount of wastewater set to the sewer system ({'value': 365.25, 'unit': 'm3/year'}), as determined from the amount of wastewater and the production volume of the generating activity, and the fraction of wastewater sent to sewers not connected to a wastewater treatment plant (0.2679174264). Only the fraction sent to a wastewater treatment pland included in production volume
  property carbon content, fossil 0.0036
    Based on an estimated COD to TOC conversion factor of {'value': 3, 'unit': 'g_COD/g_TOC'} and a fraction of C that is fossil as {'value': 0.036000000000000004, 'unit': 'ratio'}.
  property carbon content, non-fossil 0.0964
    (same comment as for wastewater, no name)
  property mass concentration, TOC 0.1 kg/m3
    estimated from the COD to TOC_ratio ({'value': 3, 'unit': 'g_COD/g_TOC'}).
  property mass concentration, DOC 0.041875 kg/m3
    DOC is calculated as Total Organic Carbon (TOC) - Particulate Organics (PO). DOC is estimated from the COD to TOC_ratio ({'value': 3, 'unit': 'g_COD/g_TOC'}). PO is estimated using a C to Volatile Suspended Solids (VSS) ratio of 0.5 gC/gVSS. VSS is estimated as 0.11624999999845477.
  property mass concentration, Kjeldahl Nitrogen as N 0.035 kg/m3
    Mass concentration of total Kjeldahl (TKN) as N. Note that dissolved Kjeldahl Nitrogen is an optional yet desirable specification of total Kjeldahl Nitrogen.
  property mass concentration, dissolved ammonia NH4 as N 0.0231 kg/m3
    Mass concentration of dissolved ammonia NH4 (CAS 007664-41-7) as N. Note that dissolved and particulate N are optional yet desirable specifications of total nitrogen.
  property mass concentration, dissolved phosphate PO4 as P 0.003 kg/m3
    Mass concentration of Dissolved Phosphate PO4 as P. Note that dissolved and particulate P are optional yet desirable specifications of total phosphorous.
  properties: dry mass 1.32861 kg, wet mass 1001.33 kg, water in wet mass 1000 kg, water content 752.667, COD, mass per volume 0.3 kg/m3, mass concentration, phophorus 0.006 kg/m3, BOD5, mass per volume 0.14706 kg/m3, suspended soilds, mass per volume 0.16125 kg/m3, mass concentration, aluminium 0.0010379 kg/m3, mass concentration, arsenic 9e-7 kg/m3, mass concentration, calcium 0.050834 kg/m3, mass concentration, cadmium 3e-7 kg/m3, mass concentration, chlorine 0.030031 kg/m3, mass concentration, cobalt 1.6e-6 kg/m3, mass concentration, chromium 1.22e-5 kg/m3, mass concentration, copper 3.74e-5 kg/m3, mass concentration, fluorine 3.28e-5 kg/m3, mass concentration, iron 0.0070928 kg/m3, mass concentration, mercury 2e-7 kg/m3, mass concentration, potassium 0.0003989 kg/m3, mass concentration, magnesium 0.0057071 kg/m3, mass concentration, manganese 5.3e-5 kg/m3, mass concentration, molybdenum 1e-6 kg/m3, mass concentration, sodium 0.002186 kg/m3, mass concentration, nickel 6.6e-6 kg/m3, mass concentration, lead 8.6e-6 kg/m3, mass concentration, silicon 0.0031263 kg/m3, mass concentration, tin 3.4e-6 kg/m3, mass concentration, zinc 0.0001094 kg/m3

## Inputs from technosphere
- electricity, low voltage: 0.127122 kWh; lognormal variance with pedigree 0.0526, pedigree (3,5,1,5,4)
  Electricity consumption considers energy required for aeration, pumping, mixing, dewatering and others (e.g. lighting). The estimations are based on design parameters from Metcalf and Eddy (e.g. pumping flows, aeration capacity), other sources (e.g. for Standard Aeration Energy) and expert judgement.
  Uncertainty: Default pedigree scores for technosphere exchanges calculated with the ecoinvent wastewater tool
- iron (III) chloride: 0 kg
  Used for chemical precipitation of P
- polyacrylamide: 0.00154122 kg; lognormal variance with pedigree 0.0526, pedigree (3,5,1,5,4)
  Polyelectrolyte for thickening
  Uncertainty: Default pedigree scores for technosphere exchanges calculated with the ecoinvent wastewater tool
  properties: dry mass 1 kg, wet mass 1 kg, carbon content, fossil 0.51
- sewer grid, 1.1E10l/year, 242 km: 3.09393e-8 km; lognormal variance with pedigree 0.51, pedigree (5,5,5,5,5)
  Rough estimate based on Swiss data for sewer length per person equivalent. The length per person equivalent is given per WWTP capacity class.This value is converted to m3 transported using capacity and treated volume amounts from sample Spanish wastewater treatment plants. The same relations are assumed to hold whether the water sent to the sewer is ultimately discharged to the environment or treated.
  Uncertainty: Very rough estimate based on Swiss data (Doka 2009) and sampled Spanish WWTP.
- sewer grid, 4.7E10l/year, 583 km: 2.25903e-7 km; lognormal variance with pedigree 0.51, pedigree (5,5,5,5,5)
  (same comment as for sewer grid, 1.1E10l/year, 242 km)
- wastewater treatment facility, capacity class 2, between 50,000 and 100,000 PE: 4.34877e-9 km; lognormal variance with pedigree 0.47, pedigree (5,5,1,5,5)
  Rough estimate based on Spanish data for one WWTP of this class.The expected lifetime is 30 years.The conversion from PE to m3 treated is based on observed values (73.0 m3/year / PE).
  Uncertainty: Very rough estimate based on a single Spanish plant and an estimated lifetime of 30 years
- wastewater treatment facility, capacity class 1, greater than 100,000 PE: 1.66044e-9 km; lognormal variance with pedigree 0.47, pedigree (5,5,1,5,5)
  Rough estimate based on Spanish data for one WWTP of this class.The expected lifetime is 30 years.The conversion from PE to m3 treated is based on observed values (97.33333333333333 m3/year / PE).
  Uncertainty: Very rough estimate based on a single Spanish plant and an estimated lifetime of 30 years

## Emissions to nature
- Water [water, surface water]: 1 m3; lognormal variance with pedigree 0, pedigree (1,1,1,1,1)
  Uncertainty: Uncertainty not considered
- COD, Chemical Oxygen Demand [water, surface water]: 0.0273336 kg; lognormal variance with pedigree 0.092, pedigree (3,5,1,5,4)
  Uncertainty: Default basic uncertainty for emissions to water.
- Nitrogen [water, surface water]: 0.00177975 kg; lognormal variance with pedigree 0.092, pedigree (3,5,1,5,4)
  Uncertainty: Default basic uncertainty for emissions to water.
- Ammonium, ion [water, surface water]: 0.0058798 kg; lognormal variance with pedigree 0, pedigree (1,1,1,1,1)
  Uncertainty: Uncertainty not considered
- Phosphorus [water, surface water]: 0.00273021 kg; lognormal variance with pedigree 0.092, pedigree (3,5,1,5,4)
  Uncertainty: Default basic uncertainty for emissions to water.
- Aluminium [water, surface water]: 5.1895e-5 kg; lognormal variance with pedigree 0.702, pedigree (3,5,1,5,4)
  Uncertainty: Default basic uncertainty for metals to water.
- Arsenic, ion [water, surface water]: 7.02e-7 kg; lognormal variance with pedigree 0.092, pedigree (3,5,1,5,4)
  Uncertainty: Default basic uncertainty for emissions to water.
- Calcium, ion [water, surface water]: 0.0457506 kg; lognormal variance with pedigree 0.092, pedigree (3,5,1,5,4)
  Uncertainty: Default basic uncertainty for emissions to water.
- Cadmium, ion [water, surface water]: 1.5e-7 kg; lognormal variance with pedigree 0.702, pedigree (3,5,1,5,4)
  Uncertainty: Default basic uncertainty for metals to water.
- Chlorine [water, surface water]: 0.030031 kg; lognormal variance with pedigree 0.092, pedigree (3,5,1,5,4)
  Uncertainty: Default basic uncertainty for emissions to water.
- Cobalt [water, surface water]: 8e-7 kg; lognormal variance with pedigree 0.702, pedigree (3,5,1,5,4)
  Uncertainty: Default basic uncertainty for metals to water.
- Chromium VI [water, surface water]: 6.1e-6 kg; lognormal variance with pedigree 0.702, pedigree (3,5,1,5,4)
  Uncertainty: Default basic uncertainty for metals to water.
- Copper, ion [water, surface water]: 9.35e-6 kg; lognormal variance with pedigree 0.702, pedigree (3,5,1,5,4)
  Uncertainty: Default basic uncertainty for metals to water.
- Fluoride [water, surface water]: 3.28e-5 kg; lognormal variance with pedigree 0.092, pedigree (3,5,1,5,4)
  Uncertainty: Default basic uncertainty for emissions to water.
- Iron, ion [water, surface water]: 0.0035464 kg; lognormal variance with pedigree 0.702, pedigree (3,5,1,5,4)
  Uncertainty: Default basic uncertainty for metals to water.
- Mercury [water, surface water]: 6e-8 kg; lognormal variance with pedigree 0.702, pedigree (3,5,1,5,4)
  Uncertainty: Default basic uncertainty for metals to water.
- Potassium, ion [water, surface water]: 0.0003989 kg; lognormal variance with pedigree 0.092, pedigree (3,5,1,5,4)
  Uncertainty: Default basic uncertainty for emissions to water.
- Magnesium [water, surface water]: 0.00513639 kg; lognormal variance with pedigree 0.092, pedigree (3,5,1,5,4)
  Uncertainty: Default basic uncertainty for emissions to water.
- Manganese [water, surface water]: 2.65e-5 kg; lognormal variance with pedigree 0.702, pedigree (3,5,1,5,4)
  Uncertainty: Default basic uncertainty for metals to water.
- Molybdenum [water, surface water]: 5e-7 kg; lognormal variance with pedigree 0.702, pedigree (3,5,1,5,4)
  Uncertainty: Default basic uncertainty for metals to water.
- Sodium, ion [water, surface water]: 0.002186 kg; lognormal variance with pedigree 0.092, pedigree (3,5,1,5,4)
  Uncertainty: Default basic uncertainty for emissions to water.
- Nickel, ion [water, surface water]: 3.96e-6 kg; lognormal variance with pedigree 0.702, pedigree (3,5,1,5,4)
  Uncertainty: Default basic uncertainty for metals to water.
- Lead [water, surface water]: 8.6e-7 kg; lognormal variance with pedigree 0.702, pedigree (3,5,1,5,4)
  Uncertainty: Default basic uncertainty for metals to water.
- Silicon [water, surface water]: 0.000156315 kg; lognormal variance with pedigree 0.092, pedigree (3,5,1,5,4)
  Uncertainty: Default basic uncertainty for emissions to water.
- Tin, ion [water, surface water]: 1.394e-6 kg; lognormal variance with pedigree 0.702, pedigree (3,5,1,5,4)
  Uncertainty: Default basic uncertainty for metals to water.
- Zinc, ion [water, surface water]: 3.282e-5 kg; lognormal variance with pedigree 0.702, pedigree (3,5,1,5,4)
  Uncertainty: Default basic uncertainty for metals to water.
- TOC, Total Organic Carbon [water, surface water]: 0.00911119 kg; lognormal variance with pedigree 0.218, pedigree (4,5,5,5,5)
  estimated from the COD to TOC_ratio ({'value': 3, 'unit': 'g_COD/g_TOC'}).
  Uncertainty: Uncertainty associated with the COD to TOC ratio, VSS amount and COD amount.
- DOC, Dissolved Organic Carbon [water, surface water]: 0.00381531 kg; lognormal variance with pedigree 0.218, pedigree (4,5,5,5,5)
  DOC is calculated as Total Organic Carbon (TOC) - Particulate Organics (PO). DOC is estimated from the COD to TOC_ratio ({'value': 3, 'unit': 'g_COD/g_TOC'}). PO is estimated using a C to Volatile Suspended Solids (VSS) ratio of 0.5 gC/gVSS. VSS is estimated from VSS/DOC ratio in raw effluent 0.3875.
  Uncertainty: Uncertainty associated with the COD to TOC ratio, VSS amount and COD amount.
- BOD5, Biological Oxygen Demand [water, surface water]: 0.0133989 kg; lognormal variance with pedigree 0, pedigree (1,1,1,1,1)
  Crude assumption based on ratio of COD/BOD in raw wastewater and the amount of COD in effluent.
  Uncertainty: Uncertainty not considered
- Dinitrogen monoxide [air, urban air close to ground]: 3.5e-5 kg; lognormal variance with pedigree 0.298, pedigree (4,5,5,5,5)
- Carbon dioxide, fossil [air, urban air close to ground]: 0.00668027 kg; lognormal variance with pedigree 0.1786, pedigree (4,5,5,5,5)
- Carbon dioxide, non-fossil [air, urban air close to ground]: 0.178883 kg; lognormal variance with pedigree 0.1786, pedigree (4,5,5,5,5)

## Sampling procedure
Most exchanges based on a model built from activated sludge process guidelines.

## Extrapolations
The regions used to model the wastewater treatment plant are GLO.
