# treatment of wastewater from ceramic production, capacity 5E9l/year

Dataset: EcoSpold 2, unit process
Geography: GLO
Time period: 1994-01-01 to 2000-12-31
Technology level: current
Classification: ISIC rev.4 ecoinvent: 3700:Sewerage
Classification: EcoSpold01Categories: waste management/wastewater treatment
Tags: ConvertedDataset; Treatment
Scenario: Business-as-Usual
Generated by: Gabor Doka (obsolete)
Published in: Doka G. 2008
Database: ecoinvent
isCopyrightProtected: true
accessRestrictedTo: 1

## General comment
Wastewater purified in a medium size municipal wastewater treatment plant (capacity class 3), with an average capacity size of 24900 per-captia-equivalents PCE.
Wastewater contains (in kg/m3): Ba: 0.00048 (GSD=300%); Cd: 0.000008 (GSD=300%); Co: 0.000025 (GSD=300%); Cr: 0.000025 (GSD=300%); Cu: 0.000005 (GSD=300%); Ni: 0.000025 (GSD=300%); Pb: 0.000025 (GSD=300%); Zn: 0.000012 (GSD=300%);
[This dataset was already contained in the ecoinvent database version 2. It was not individually updated during the transfer to ecoinvent version 3. Life Cycle Impact Assessment results may still have changed, as they are affected by changes in the supply chain, i.e. in other datasets. This dataset was generated following the ecoinvent quality guidelines for version 2. It may have been subject to central changes described in the ecoinvent version 3 change report (http://www.ecoinvent.org/database/ecoinvent-version-3/reports-of-changes/), and the results of the central updates were reviewed extensively. The changes added e.g. consistent water flows and other information throughout the database. The documentation of this dataset can be found in the ecoinvent reports of version 2, which are still available via the ecoinvent website. The change report linked above covers all central changes that were made during the conversion process.]

## Included activities end
Infrastructure materials for municipal wastewater treatment plant, transports, dismantling. Land use burdens.

## Geography
Specific to the technology mix encountered in Switzerland in 2000. Well applicable to modern treatment practices in Europe, North America or Japan.

## Technology
Three stage wastewater treatment (mechanical, biological, chemical) including sludge digestion (fermentation) according to the average technology in Switzerland

## Parameters
- fraction, process water, to air: 0.1 dimensionless; name fraction_PW_to_air; lognormal variance with pedigree 0.092025, pedigree (4,4,3,2,4)

## Reference product
- wastewater from ceramic production: -1 m3; By-product classification Waste; CPC 39920: Sewage sludge
  EcoSpold01Location=CH
  production volume 4 m3
    This is a placeholder value that does not reflect real-world production volumes. This dataset does not currently require a real-world production volume to work in the database framework, and no actual data were collected yet. This has no negative effect on the results of the ecoinvent database.
  properties: water content 2962.17, carbon content, fossil 0, water in wet mass 999.663 kg, wet mass 1000 kg, carbon content, non-fossil 0, dry mass 0.337476 kg

## By-products
- waste graphical paper: 0.0155 kg; By-product classification Waste; CPC 39990: Other wastes n.e.c.; lognormal variance with pedigree 0.002, pedigree (1,1,1,5,1)
  EcoSpold01Location=CH
  direct wastewater treatment plant burden. Uncertainty calculated from wastewater composition and treatment model
  production volume 0.062 kg
    Calculated from the production volume of wastewater from ceramic production in proportion to the respective output amounts.
  properties: carbon content, non-fossil 0.454955, water in wet mass 0.112 kg, carbon content, fossil 0, water content 0.126126, wet mass 1 kg, dry mass 0.888 kg
- waste cement, hydrated: 5.7306e-5 kg; By-product classification Waste; CPC 39: Wastes or scraps; lognormal variance with pedigree 0.042, pedigree (1,1,1,5,1)
  burden from sludge incineration. Uncertainty calculated from wastewater composition and treatment model
  EcoSpold01Location=CH
  production volume 0.000229224 kg
    (same comment as for waste graphical paper)
  properties: water content 0, water in wet mass 0 kg, carbon content, fossil 0, carbon content, non-fossil 0, dry mass 1 kg, wet mass 1 kg
- waste plastic, mixture: 0.0155 kg; By-product classification Waste; CPC 39270: Waste, parings and scrap of plastics; lognormal variance with pedigree 0.002, pedigree (1,1,1,5,1)
  direct wastewater treatment plant burden. Uncertainty calculated from wastewater composition and treatment model
  EcoSpold01Location=CH
  production volume 0.062 kg
    (same comment as for waste graphical paper)
  property carbon content, fossil 0.747344
    C content in 1 kg DM was calculated using data in Tab A.2, ecoinvent v2.2 report 13_I
  properties: water content 0.180638, water in wet mass 0.153 kg, carbon content, non-fossil 0, dry mass 0.847 kg, wet mass 1 kg

## Inputs from technosphere
- hydrochloric acid, without water, in 30% solution state: 7.0791e-9 kg; lognormal variance with pedigree 0.502, pedigree (1,1,1,5,1)
  burden from sludge incineration. Uncertainty calculated from wastewater composition and treatment model
  EcoSpold01Location=RER
  properties: dry mass 1 kg, wet mass 1 kg
- process-specific burdens, municipal waste incineration: 0.0012604 kg; lognormal variance with pedigree 0.402, pedigree (1,1,1,5,1)
  EcoSpold01Location=CH
  burden from sludge incineration. Uncertainty calculated from wastewater composition and treatment model
- heat, central or small-scale, other than natural gas: 0.0135172 MJ; lognormal variance with pedigree 0.012, pedigree (1,1,1,5,1)
  (same comment as for waste plastic, mixture)
- slag landfill: 4.5373e-13 unit; lognormal variance with pedigree 0.032, pedigree (1,1,1,5,1)
  (same comment as for process-specific burdens, municipal waste incineration)
- heat, district or industrial, natural gas: 0.0186288 MJ; lognormal variance with pedigree 0.012, pedigree (1,1,1,5,1)
  direct wastewater treatment plant burden. Uncertainty calculated from wastewater composition and treatment model
  EcoSpold01Location=RER
- heat, district or industrial, other than natural gas: 0.001057 MJ; lognormal variance with pedigree 0.402, pedigree (1,1,1,5,1)
  (same comment as for process-specific burdens, municipal waste incineration)
- wastewater treatment facility, capacity 5E9l/year: 5.6882e-9 unit; lognormal variance with pedigree 0.002, pedigree (1,1,1,5,1)
  uncertainty heeded in exchanges of the module
  EcoSpold01Location=CH
- iron (III) chloride, without water, in 40% solution state: 2.1534e-6 kg; lognormal variance with pedigree 0.502, pedigree (1,1,1,5,1)
  EcoSpold01Location=CH
  direct wastewater treatment plant burden plus burden from sludge incineration. Uncertainty calculated from wastewater composition and treatment model
  properties: wet mass 1 kg, dry mass 1 kg
- chemical, inorganic: 1.1798e-8 kg; lognormal variance with pedigree 0.502, pedigree (1,1,1,5,1)
  burden from sludge incineration. Uncertainty calculated from wastewater composition and treatment model
  EcoSpold01Location=GLO
  properties: carbon content, fossil 0.003, wet mass 1 kg, dry mass 1 kg
  note on carbon content, fossil: This dataset is an unweighted average of 20 inorganic substances (listed in Tab 88.1, ecoinvent v2.2 report 8, part II), being part of the top100 chemicals included in this database. The C-content has also been calculated as an unweighted average of the C content of the substances composing this dataset.
- cement, unspecified: 2.2923e-5 kg; lognormal variance with pedigree 0.042, pedigree (1,1,1,5,1)
  (same comment as for process-specific burdens, municipal waste incineration)
  properties: dry mass 1 kg, wet mass 1 kg
- process-specific burdens, residual material landfill: 5.7306e-5 kg; lognormal variance with pedigree 0.032, pedigree (1,1,1,5,1)
  (same comment as for waste cement, hydrated)
- liquid manure spreading, by vacuum tanker: 3.5568e-6 m3; lognormal variance with pedigree 0.032, pedigree (1,1,1,5,1)
  burden from sludge spreading. Uncertainty calculated from wastewater composition and treatment model
  EcoSpold01Location=CH
- electricity, low voltage: 0.028235 kWh; lognormal variance with pedigree 0.002, pedigree (1,1,1,5,1)
  (same comment as for waste graphical paper)
- residual material landfill: 1.1939e-13 unit; lognormal variance with pedigree 0.032, pedigree (1,1,1,5,1)
  (same comment as for waste cement, hydrated)
- chemical, organic: 6.5003e-6 kg; lognormal variance with pedigree 1.232, pedigree (1,1,1,5,1)
  (same comment as for chemical, inorganic)
  properties: wet mass 1 kg, dry mass 1 kg, carbon content, fossil 0.628
  note on carbon content, fossil: This dataset is an unweighted average of 20 organic substances (listed in Tab 88.1, ecoinvent v2.2 report 8, part II), being part of the top100 chemicals included in this database. The C-content has also been calculated as an unweighted average of the C content of the substances composing this dataset.
- sewer grid, 5E9l/year, 110 km: 2.1782e-7 km; lognormal variance with pedigree 0.002, pedigree (1,1,1,5,1)
  EcoSpold01Location=CH
  uncertainty heeded in exchanges of the module
- electricity, high voltage: 0.0001812 kWh; lognormal variance with pedigree 0.842, pedigree (1,1,1,5,1)
  (same comment as for waste cement, hydrated)
- process-specific burdens, slag landfill: 0.00025522 kg; lognormal variance with pedigree 0.032, pedigree (1,1,1,5,1)
  (same comment as for process-specific burdens, municipal waste incineration)
- municipal waste incineration facility: 3.1509e-13 unit; lognormal variance with pedigree 0.402, pedigree (1,1,1,5,1)
  (same comment as for process-specific burdens, municipal waste incineration)

## Emissions to nature
- Water [air, unspecified]: 0.1 m3; name water_to_air_unspecified; lognormal variance with pedigree 0.0427, pedigree (2,2,1,5,1)
  Calculated value based on water balance.
  property fraction, origin: salt water 0; name fraction_origin_salt_water
  property fraction, origin: fresh water 0; name fraction_origin_fresh_water
  property fraction, origin: unspecified 1; name fraction_origin_unspecified
- Water [water, unspecified]: 0.9 m3; name water_to_water_unspecified; lognormal variance with pedigree 0.0427, pedigree (2,2,1,5,1)
  Calculated value based on water balance.
  property fraction, origin: salt water 0; name fraction_origin_salt_water_Ww
  property fraction, origin: unspecified 0; name fraction_origin_unspecified_Ww
  property water in wet mass 1000 kg; name WWM
  property carbon content, fossil 0; name C_content_fossil
  property carbon content, non-fossil 0; name C_content_non_fossil
  property wet mass 1000 kg; name WM
  property dry mass 0 kg; name DM
  property fraction, origin: fresh water 1; name fraction_origin_fresh_water_Ww
- Chromium VI [water, surface water]: 1.2901e-5 kg; lognormal variance with pedigree 1.142, pedigree (1,1,1,5,1)
  sewer overload discharge plus direct wastewater treatment plant emission plus emission from sludge incineration. Uncertainty calculated from wastewater composition and treatment model
- Lead [water, surface water]: 2.7478e-6 kg; lognormal variance with pedigree 1.082, pedigree (1,1,1,5,1)
  (same comment as for Chromium VI)
- Methane, fossil [air, urban air close to ground]: 5.0413e-9 kg; lognormal variance with pedigree 0.452, pedigree (1,1,1,5,1)
  emission from sludge incineration. Uncertainty calculated from wastewater composition and treatment model
- Cadmium, ion [water, surface water]: 4.0609e-6 kg; lognormal variance with pedigree 1.172, pedigree (1,1,1,5,1)
  (same comment as for Chromium VI)
- Zinc [soil, agricultural]: 3.8847e-6 kg; lognormal variance with pedigree 1.232, pedigree (1,1,1,5,1)
  emission from sludge spreading. Uncertainty calculated from wastewater composition and treatment model
- Barium [water, surface water]: 2.8821e-5 kg; lognormal variance with pedigree 1.012, pedigree (1,1,1,5,1)
  (same comment as for Chromium VI)
- Cobalt [water, surface water]: 1.2689e-5 kg; lognormal variance with pedigree 1.172, pedigree (1,1,1,5,1)
  (same comment as for Chromium VI)
- Lead [soil, agricultural]: 1.0426e-5 kg; lognormal variance with pedigree 1.232, pedigree (1,1,1,5,1)
  (same comment as for Zinc)
- Lead [air, urban air close to ground]: 4.3979e-10 kg; lognormal variance with pedigree 1.272, pedigree (1,1,1,5,1)
  direct digester gas emission plus emission from sludge incineration. Uncertainty calculated from wastewater composition and treatment model
- Zinc, ion [water, ground-, long-term]: 6.8312e-8 kg; lognormal variance with pedigree 6.022, pedigree (1,1,1,5,1)
  (same comment as for Methane, fossil)
- Chromium [soil, agricultural]: 5.7691e-6 kg; lognormal variance with pedigree 1.232, pedigree (1,1,1,5,1)
  (same comment as for Zinc)
- Cadmium [soil, agricultural]: 1.8461e-6 kg; lognormal variance with pedigree 1.232, pedigree (1,1,1,5,1)
  (same comment as for Zinc)
- Chromium, ion [water, surface water]: 2.0855e-8 kg; lognormal variance with pedigree 1.242, pedigree (1,1,1,5,1)
  (same comment as for Methane, fossil)
- Carbon monoxide, fossil [air, urban air close to ground]: 1.7607e-7 kg; lognormal variance with pedigree 1.052, pedigree (1,1,1,5,1)
  (same comment as for Methane, fossil)
- Zinc [air, urban air close to ground]: 7.1981e-11 kg; lognormal variance with pedigree 1.272, pedigree (1,1,1,5,1)
  (same comment as for Lead)
- Cobalt [air, urban air close to ground]: 2.0775e-13 kg; lognormal variance with pedigree 1.332, pedigree (1,1,1,5,1)
  (same comment as for Lead)
- Cobalt [water, ground-, long-term]: 5.7289e-6 kg; lognormal variance with pedigree 1.232, pedigree (1,1,1,5,1)
  (same comment as for Methane, fossil)
- Barium [water, ground-, long-term]: 0.00021289 kg; lognormal variance with pedigree 1.332, pedigree (1,1,1,5,1)
  (same comment as for Methane, fossil)
- Copper, ion [water, surface water]: 1.297e-6 kg; lognormal variance with pedigree 1.142, pedigree (1,1,1,5,1)
  (same comment as for Chromium VI)
- Chromium VI [water, ground-, long-term]: 6.9269e-7 kg; lognormal variance with pedigree 1.612, pedigree (1,1,1,5,1)
  (same comment as for Methane, fossil)
- Barium [soil, agricultural]: 0.00021142 kg; lognormal variance with pedigree 1.232, pedigree (1,1,1,5,1)
  (same comment as for Zinc)
- Zinc, ion [water, surface water]: 3.71e-6 kg; lognormal variance with pedigree 1.152, pedigree (1,1,1,5,1)
  (same comment as for Chromium VI)
- Copper [soil, agricultural]: 1.7351e-6 kg; lognormal variance with pedigree 1.232, pedigree (1,1,1,5,1)
  (same comment as for Zinc)
- Nickel, ion [water, surface water]: 1.5163e-5 kg; lognormal variance with pedigree 1.172, pedigree (1,1,1,5,1)
  (same comment as for Chromium VI)
- Chromium [air, urban air close to ground]: 4.8383e-13 kg; lognormal variance with pedigree 1.322, pedigree (1,1,1,5,1)
  (same comment as for Lead)
- Cobalt [soil, agricultural]: 5.7691e-6 kg; lognormal variance with pedigree 1.232, pedigree (1,1,1,5,1)
  (same comment as for Zinc)
- Nickel [air, urban air close to ground]: 2.257e-13 kg; lognormal variance with pedigree 1.332, pedigree (1,1,1,5,1)
  (same comment as for Lead)
- Cadmium, ion [water, ground-, long-term]: 2.101e-8 kg; lognormal variance with pedigree 7.422, pedigree (1,1,1,5,1)
  (same comment as for Methane, fossil)
- Nickel, ion [water, ground-, long-term]: 4.8961e-6 kg; lognormal variance with pedigree 1.232, pedigree (1,1,1,5,1)
  (same comment as for Methane, fossil)
- Copper [air, urban air close to ground]: 1.4527e-11 kg; lognormal variance with pedigree 1.282, pedigree (1,1,1,5,1)
  (same comment as for Lead)
- Nickel [soil, agricultural]: 4.6106e-6 kg; lognormal variance with pedigree 1.232, pedigree (1,1,1,5,1)
  (same comment as for Zinc)
- Barium [air, urban air close to ground]: 2.398e-7 kg; lognormal variance with pedigree 1.252, pedigree (1,1,1,5,1)
  (same comment as for Lead)
- Cadmium [air, urban air close to ground]: 1.1707e-10 kg; lognormal variance with pedigree 1.242, pedigree (1,1,1,5,1)
  (same comment as for Lead)
- Copper, ion [water, ground-, long-term]: 1.5908e-6 kg; lognormal variance with pedigree 1.242, pedigree (1,1,1,5,1)
  (same comment as for Methane, fossil)
- Lead [water, ground-, long-term]: 8.4257e-7 kg; lognormal variance with pedigree 7.432, pedigree (1,1,1,5,1)
  (same comment as for Methane, fossil)

## Extrapolations
wastewater compositions from literature and/or estimates This dataset has been copied from an original dataset covering the geography CH. The uncertainty has been adjusted accordingly.

## Review by Niels Jungbluth 2009-01-22
passed.
