# treatment of wastewater, from dinosaur zoo

Dataset: EcoSpold 2, unit process
Geography: GLO
Time period: 2014-01-01 to 2015-12-31
Technology level: current
Classification: ISIC rev.4 ecoinvent: 3700:Sewerage
Synonyms: Jurassic Park; waste water treatment; WWT
Scenario: Business-as-Usual
Generated by: Pascal Lesage
isCopyrightProtected: true
accessRestrictedTo: 1

## General comment
generalComment0
generalComment1
generalComment2

## Included activities start
Treatment of waste water, collected from dinosaur cages.

## Included activities end
Includes the production of sludge.

## Allocation
allocationComment0
allocationComment1
allocationComment2

## Geography
geographyComment0
geographyComment1
geographyComment2

## Technology
technologyComment0
technologyComment1
technologyComment2

## Time period
timePeriodComment0
timePeriodComment1
timePeriodComment2

## Reference product
- wastewater, from dinosaur zoo: -1 m3
  exchange comment
  production volume 20000 m3
    production volume comment
  properties: iron content 0.002, manganese content 0.001, arsenic content 0.004, cobalt content 0.005

## By-products
- sludge from dinosaur zoo: 0.4 kg; lognormal variance with pedigree 0.1251, pedigree (1,2,1,1,5)
  exchange comment
  production volume 8000 kg
    production volume comment
  properties: iron content 0.002, manganese content 0.001, arsenic content 0.004, cobalt content 0.005

## Inputs from technosphere
- electricity, medium voltage: 2.3 kWh
  exchange comment
  properties: dry mass 1 kg, wet mass 1 kg

## Inputs from nature
- Oxygen [natural resource, in air]: 0.002 kg
  exchange comment

## Emissions to nature
- Carbon dioxide, fossil [air, unspecified]: 0.02 kg
  exchange comment

## Sampling procedure
sampling procedure comment here

## Extrapolations
extrapolations comment here
